// SBML level 3 version 2

model myelotoxicity_friberg_model_PD()
  // model units - time: hour

  // Compartments:
  compartment central = 0.65 litre;
  compartment peripheral = 4.2 litre;

  // Species:
  species drug_c in central = 1e-9;  // substance in gram
  species drug_p in peripheral = 1e-9;  // substance in gram

  // Parameters:
  clearance = 2.8 litre_per_hour;
  k_peripheral = 2.1 litre_per_hour;

  // Reactions:
  elimination: drug_c => ; clearance*drug_c;
  Central_to_Peripheral: drug_c -> drug_p; k_peripheral*(drug_c - drug_p);

  // Unit definitions:
  unit hour = 3600 second;
  unit litre_per_hour = litre / (3600 second);
end
