// SBML level 3 version 2

model PK_Model_1065667()
  // model units - substance: substance, time: time, volume: volume, area: area, length: length, extent: substance

  // Compartments:
  compartment central = 60;
  compartment peripheral = 45;
  compartment peripheral2 = 45;

  // Species:
  species drug_c in central = 1e-6;
  species drug_p in peripheral = 1e-6;
  species drug_p2 in peripheral2 = 1e-6;

  // Parameters:
  elimination_rate = 0.555 per_hr;
  transfer_1_to_2 = 0.898 per_hr;
  transfer_2_to_1 = 0.634 per_hr;
  transfer_1_to_3 = 0.358 per_hr;
  transfer_3_to_1 = 0.574 per_hr;

  // Reactions:
  Central_to_Peripheral: drug_c => drug_p; transfer_1_to_2*drug_c*central;
  Peripheral_to_Central: drug_p => drug_c; transfer_2_to_1*drug_p*peripheral;
  elimination: drug_c => ; elimination_rate*drug_c*central;
  Central_to_Peripheral2: drug_c => drug_p2; transfer_1_to_3*drug_c*central;
  Peripheral2_to_Central: drug_p2 => drug_c; transfer_2_to_1*drug_p2*peripheral2;

  // Unit definitions:
  unit length = metre;
  unit area = metre^2;
  unit time = 3600 second;
  unit substance = gram;
  unit per_hr = 1 / (3600 second);
  unit volume = 1e-3 litre;
end
